# HBV Decamer CG Oligomer Simulation
# Translated from run_oligomer_simulation.py (OpenMM/Langevin)
#
# Unit system: real  (Angstroms, kcal/mol, femtoseconds, Kelvin, g/mol)
#
# Prerequisites — run the data-file generator first:
#   python generate_lammps_data.py \
#       --pdb   decamer_sep.pdb   \
#       --bound decamer_avg.pdb   \
#       --conndir connect_files   \
#       --contactdir .            \
#       --Enative 1.0
#
# This produces:
#   decamer.lammps                    atom/bond topology
#   gaussian_native_{A,B,C,D}.table   tabulated Gaussian potentials
#   forces.lammps                     pair/bond style commands (mode-dependent)
#   harmonic_bond_coeffs.lammps       bond_coeff lines for ENM bonds
#   native_contact_coeffs.lammps      (default mode only)
#   native_contacts.pairs             (--type pairs only)
#   native_contact_pair_coeffs.lammps (--type hybrid only)
#
# Run:
#   lmp -in lammps_oligomer.in -var nsteps 10000 -var Erepulsion 1.0 -var Enative 1.0 -var seed 42
#
# NOTE: Enative is baked into the Gaussian table files at generation time.
# To use a different Enative, rerun generate_lammps_data.py --Enative <value>.
# Erepulsion scales the soft-cosine amplitude and CAN be changed here freely.

# ---------------------------------------------------------------------------
# INPUT PARAMETERS  (override via -var on the command line)
# ---------------------------------------------------------------------------
variable    Erepulsion  index  1.0     # dimensionless scale on cosine repulsion
variable    myseed      index  42      # Langevin random seed
variable    nsteps      index  1000000 # number of timesteps
variable    job_id      index  ""

print   "${job_id} hello there"

# Cosine repulsion amplitude:
#   0.1184 kJ/mol × 0.239006 kcal/kJ = 0.028278 kcal/mol per unit Erepulsion
variable    A_soft  equal ${Erepulsion}*0.028278   # kcal/mol

# ---------------------------------------------------------------------------
# SIMULATION BOX AND TOPOLOGY
# ---------------------------------------------------------------------------
units       real
atom_style  bond
boundary    p p p   # Periodic Boundary Conditions

read_data   ${job_id}decamer.lammps

# comm_modify cutoff 305.0 is no longer needed: native contacts are now pair
# interactions screened by the neighbor list, so no bonds span long distances.

# Average amino-acid residue mass for all CG beads (g/mol)
mass        * 110.0

# ---------------------------------------------------------------------------
# PAIR STYLE: soft cosine excluded-volume repulsion
#
#   E(r) = A × (1 + cos(π r / r_nc))   for r < r_nc = 15 Å
#
# This is the exact LAMMPS equivalent of the OpenMM CustomNonbondedForce:
#   energy_scale*(1 + cos((PI*r)/r_nc))
# with r_nc = 1.5 nm = 15 Å and A = Erepulsion × 0.1184 kJ/mol (in kcal/mol here).
#
# All atom pairs — including bonded ones — see the full repulsion.
# special_bonds lj 1 1 1 disables the default exclusion of 1-2/1-3/1-4 pairs,
# matching the OpenMM setup where no exclusions are added to the repulsion force.
# ---------------------------------------------------------------------------
include  ${job_id}forces.lammps
reset_atoms image all

# ---------------------------------------------------------------------------
# BOND STYLE: harmonic ENM bonds (native contacts handled via forces.lammps)
#
# Harmonic ENM bonds (within each dimer):
#   E(r) = K (r - r0)²
#   K = 41840 kJ/(mol·nm²) ÷ 2 × 0.239006 kcal/kJ ÷ (10 Å/nm)² = 50.0 kcal/mol/Å²
#   (factor of 2: OpenMM HarmonicBondForce uses k/2 × (r-r0)²; LAMMPS omits the ½)
#   r0 per bond from PDB geometry (one bond type per unique equilibrium distance)
#
# Gaussian native contacts (inter-dimer interface pairs):
#   E(r) = -Eatt × [A exp(-B r²) + C exp(-D r²)]   for r < r_ncg = 30 Å
#   A = 4.6  kJ/mol = 1.0994 kcal/mol,  B = 10.0 nm⁻² = 0.10 Å⁻²
#   C = 8.368 kJ/mol = 1.9997 kcal/mol,  D = 1.0 nm⁻²  = 0.01 Å⁻²
#   Eatt per interface: A×1.17, B×1.11, C×1.30, D×1.00  (× Enative)
#   Tabulated in gaussian_native_{A,B,C,D}.table
# ---------------------------------------------------------------------------

# ---------------------------------------------------------------------------
# INTEGRATOR: Langevin dynamics
#
# OpenMM:  LangevinIntegrator(300 K, friction=2 ps⁻¹, dt=10 fs)
# LAMMPS:  fix langevin T T damp seed
#          damp = 1/friction = 1/(2 ps⁻¹) = 0.5 ps = 500 fs
# ---------------------------------------------------------------------------
timestep    10.0            # fs

fix     NVE  all nve
fix     LANG all langevin 300.0 300.0 500.0 ${myseed}

# ---------------------------------------------------------------------------
# ENERGY MINIMIZATION  (matches simulation.minimizeEnergy(tolerance=0.1))
# ---------------------------------------------------------------------------
minimize    1.0e-4 1.0e-6 10000 100000

write_data  minimized.lammps nocoeff
write_dump  all custom minimized.lammpstrj id type xu yu zu modify sort id

reset_timestep 0

# ---------------------------------------------------------------------------
# PRODUCTION OUTPUT  (matches DCD every 5000 steps + StateDataReporter every 5000)
# ---------------------------------------------------------------------------
dump        TRAJ all dcd 5000 ${job_id}seg.dcd
dump_modify TRAJ unwrap yes

thermo_style custom step ke pe etotal temp
thermo      5000

# ---------------------------------------------------------------------------
# PRODUCTION RUN  (matches simulation.step(10000))
# ---------------------------------------------------------------------------
run         ${nsteps}

write_data    seg_final.lammps nocoeff
write_restart seg.restart
